// COMSOL Multiphysics 6.1.0.357 model "C1_solenoid_RF.mph"
// Outline of the model tree

Parameters
  h_cylinder = (n+2)*l
  r_cross = 0.03[mm]  // redius of cross section
  r_circular = 0.5[mm]  // radius of helix
  l = 0.1[mm]  // length per period of helix
  n = 20  // cycles
  r_sample = 100e-6[m]  // radius of sample
  l_sample = 2500e-6[m]  // length of sample
  I0 = -4e-3[A]
  r_air = l_sample*2.5
  eps_water = 81

Selections
  sel1: Explicit "coil" on domains 7
  sel2: Explicit "sample" on domains 6
  sel3: Explicit "pec" on boundaries 18, 25, 43

Coordinate systems
  pml1: PML "Perfectly Matched Layer 1" on domains 1-4, 8-11 | ScalingType = Spherical

Geometry
  geom1 "Geometry 1" (3D, length unit m)
    hel1: Helix | turns = n; rmaj = r_circular; rmin = r_cross; axialpitch = l
    wp1: WorkPlane | quickplane = xz; unite = on
      r1: Rectangle | pos = {0.5e-3, 1.98e-3}; size = {0.25e-3, 0.05e-3}
      r2: Rectangle | pos = {0.5e-3, -0.03e-3}; size = {0.25e-3, 0.05e-3}
      r3: Rectangle | pos = {0.63e-3, 0.02e-3}; size = {0.12e-3, 1.96e-3}
    rot1: Rotate | input = hel1, wp1; axistype = y; rot = 90
    mov1: Move | input = rot1; displx = -n*l/2; disply = 0; displz = 0
    cyl2: Cylinder | pos = {-l_sample/2, 0, 0}; axistype = x; r = r_sample; h = l_sample
    sph1: Sphere | layername = Layer 1; layer = r_air*0.2; r = r_air
    pt1: Point
    fin: Finalize "Form Union"

Materials
  mat2: Common "Air" on all domains
    def "Basic"
      thermalexpansioncoefficient = alpha_p(pA,T)
      molarmass = 0.02897
      bulkviscosity = muB(T)
      relpermeability = 1
      relpermittivity = 1
      dynamicviscosity = eta(T)
      ratioofspecificheat = 1.4
      electricconductivity = 0[S/m]
      heatcapacity = Cp(T)
      density = rho(pA,T)
      thermalconductivity = k(T)
      soundspeed = cs(T)
      eta: Piecewise | arg = T; pieces = {200.0, 1600.0, -8.38278E-7+8.35717342E-8*T^1-7.69429583E-11*T^2+4.6437266E-14*T^3-1.06585607E-17*T^4}; argunit = K; fununit = Pa*s
      Cp: Piecewise | arg = T; pieces = {200.0, 1600.0, 1047.63657-0.372589265*T^1+9.45304214E-4*T^2-6.02409443E-7*T^3+1.2858961E-10*T^4}; argunit = K; fununit = J/(kg*K)
      rho: Analytic | expr = pA*0.02897/R_const[K*mol/J]/T; args = {pA, T}; dermethod = manual; argders = {{pA, d(pA*0.02897/R_const/T,pA)}, {T, d(pA*0.02897/R_const/T,T)}}; fununit = kg/m^3; argunit = {Pa, K}
      k: Piecewise | arg = T; pieces = {200.0, 1600.0, -0.00227583562+1.15480022E-4*T^1-7.90252856E-8*T^2+4.11702505E-11*T^3-7.43864331E-15*T^4}; argunit = K; fununit = W/(m*K)
      cs: Analytic | expr = sqrt(1.4*R_const[K*mol/J]/0.02897*T); args = T; dermethod = manual; fununit = m/s; argunit = K
      an1: Analytic | funcname = alpha_p; expr = -1/rho(pA,T)*d(rho(pA,T),T); args = {pA, T}; fununit = 1/K; argunit = {Pa, K}
      an2: Analytic "Analytic 2a" | funcname = muB; expr = 0.6*eta(T); args = T; fununit = Pa*s; argunit = K
    RefractiveIndex
      n = 1
      ki = 0
    NonlinearModel
      BA = (def.gamma+1)/2
  mat1: Common "Copper" on domains 7
    def "Basic"
      relpermeability = 1
      electricconductivity = 5.998e7[S/m]
      thermalexpansioncoefficient = 17e-6[1/K]
      heatcapacity = 385[J/(kg*K)]
      relpermittivity = 1
      density = 8960[kg/m^3]
      thermalconductivity = 400[W/(m*K)]
    Enu "Young's modulus and Poisson's ratio"
      E = 110e9[Pa]
      nu = 0.35
    linzRes "Linearized resistivity"
      rho0 = 1.72e-8[ohm*m]
      alpha = 0.0039[1/K]
      Tref = 298[K]
  mat3: Common "Water, liquid" on domains 6
    def "Basic"
      thermalexpansioncoefficient = alpha_p(T)
      bulkviscosity = muB(T)
      dynamicviscosity = eta(T)
      ratioofspecificheat = gamma_w(T)
      electricconductivity = 5.5e-6[S/m]
      heatcapacity = Cp(T)
      density = rho(T)
      thermalconductivity = k(T)
      soundspeed = cs(T)
      relpermeability = 1-9.035e-6
      relpermittivity = eps_water
      eta: Piecewise
        arg = T
        pieces = 
          {273.15, 413.15, 1.3799566804-0.021224019151*T^1+1.3604562827E-4*T^2-4.6454090319E-7*T^3+8.9042735735E-10*T^4-9.0790692686E-13*T^5+3.8457331488E-16*T^6}
          {413.15, 553.75, 0.00401235783-2.10746715E-5*T^1+3.85772275E-8*T^2-2.39730284E-11*T^3}
        argunit = K
        fununit = Pa*s
      Cp: Piecewise | arg = T; pieces = {273.15, 553.75, 12010.1471-80.4072879*T^1+0.309866854*T^2-5.38186884E-4*T^3+3.62536437E-7*T^4}; argunit = K; fununit = J/(kg*K)
      rho: Piecewise
        arg = T
        smooth = contd1
        pieces = 
          {273.15, 293.15, 6.3092789034e-05*T^3-0.0603676398829*T^2+18.9229382407066*T-950.704055329848}
          {293.15, 373.15, 1.0335053319e-05*T^3-0.0133950656345*T^2+4.96928883266*T+432.257114008512}
        argunit = K
        fununit = kg/m^3
      k: Piecewise | arg = T; pieces = {273.15, 553.75, -0.869083936+0.00894880345*T^1-1.58366345E-5*T^2+7.97543259E-9*T^3}; argunit = K; fununit = W/(m*K)
      cs: Interpolation | table = {{273, 1403}, {278, 1427}, {283, 1447}, {293, 1481}, {303, 1507}, {313, 1526}, {323, 1541}, {333, 1552}, {343, 1555}, {353, 1555}, {363, 1550}, {373, 1543}}; interp = piecewisecubic; fununit = m/s; argunit = K
      an1: Analytic | funcname = alpha_p; expr = -1/rho(T)*d(rho(T),T); args = T; fununit = 1/K; argunit = K
      an2: Analytic | funcname = gamma_w; expr = 1+(T/Cp(T))*(alpha_p(T)*cs(T))^2; args = T; fununit = 1; argunit = K
      an3: Analytic | funcname = muB; expr = 2.79*eta(T); args = T; fununit = Pa*s; argunit = K

Physics
  emw: ElectromagneticWaves "Electromagnetic Waves, Frequency Domain" on all domains
    dependent variable E = {Ex, Ey, Ez}
    wee1: WaveEquationElectric (default)
    pec1: PerfectElectricConductor (default)
    init1: init "Initial Values 1" (default)
    pmc1: PerfectMagneticConductor (disabled) on no boundaries
    pec2: PerfectElectricConductor on boundaries 18, 43
    lport1: LumpedPort on boundaries 25 | V0 = 1[V]; I0 = I0; TerminalType = Cable
    sctr1: Scattering "Scattering Boundary Condition 1" (disabled) on no boundaries
    pmc2: PerfectMagneticConductor (disabled) on boundaries 5-8, 29, 30, 35, 40

Mesh
  mesh1 "Mesh 1"
    ftri1: FreeTri "port" on selection sel3
      size1: Size on selection sel3 | hauto = 1
    ftet1: FreeTet "coil" on selection sel1
      size1: Size on selection sel1 | hauto = 3
    ftet3: FreeTet "sample" on selection sel2
      size1: Size on selection sel2 | hauto = 3
    swe1: Sweep "Swept 1" on domains 1-4, 8-11
      dis1: Distribution on domains 1-4, 8-11
    ftet2: FreeTet "Free Tetrahedral 2" on remaining entities
      size1: Size on entire geometry

Studies
  std1 "Study 1"
    freq: Frequency "Frequency Domain" | punit = MHz; plist = 500

Solver configurations
  sol1 "Solution 1" (study std1)
    v1: Variables "Dependent Variables 1"
    s1: Stationary "Stationary Solver 1" | stol = 0.01; linpmethod = sol
      p1: Parametric | pname = freq; plistarr = 500; punit = MHz; pcontinuationmode = no
      fc1: FullyCoupled | linsolver = i1
      i1: Iterative "Suggested Iterative Solver (emw)" | itrestart = 300; prefuntype = right
        mg1: Multigrid | iter = 1

Datasets
  dset1: Solution on domains 6, 7 | solution = sol1
  cpl1: CutPlane "x-y plane" | data = dset1; quickplane = xy
  cpl2: CutPlane "y-z plane" | data = dset1
  cpl3: CutPlane "x-z plane" | data = dset1; quickplane = xz
  cln1: CutLine3D "x line" | data = dset1; genpoints = {{-l_sample/2, 0, 0}, {l_sample/2, 0, 0}}
  cln2: CutLine3D "y line" | data = dset1; genpoints = {{0, -r_sample/2, 0}, {0, r_sample/2, 0}}; bounded = off
  cln3: CutLine3D "z line" | data = dset1; genpoints = {{0, 0, -r_sample/2}, {0, 0, r_sample/2}}; bounded = off

Derived values
  gev1: EvalGlobal "S-Parameter (emw)"
    data = dset1
    table = tbl2
    expr = emw.Zport_1
    unit = Ω
    descr = Lumped port impedance
  gev2: EvalGlobal "Global Evaluation 2" | data = dset1; table = new; expr = arg(emw.Iport_1)*180/pi; unit = rad
  gev3: EvalGlobal "Global Evaluation 3"
    data = dset1
    table = tbl12
    expr = emw.Iport_1
    unit = A
    descr = Lumped port current
  gev4: EvalGlobal "Global Evaluation 4"
    data = dset1
    table = tbl13
    expr = {(1+emw.S11)/(1-emw.S11)*50, emw.Zport_1, emw.S11}
    unit = {1, Ω, 1}
    descr = {, Lumped port impedance, S11}

Tables
  tbl2: Table
    freq (GHz) | S11 (1) | Lumped port impedance (Ω)
    1 | -0.552863 | 4.19777+481.788i
  tbl4: Table
    // Global Evaluation 2
    r_sample (m) | freq (MHz) | Lumped port impedance (Ω)
    5e-05 | 500 | -149.354-45991.5i
    0.0001 | 500 | -68.9617-45416.1i
    0.00015 | 500 | 58.6168-44634.9i
    0.0002 | 500 | 26.1149-44058.6i
    0.00025 | 500 | 19.9155-43406.4i
  tbl5: Table "Solution 1/Stationary Solver 1, GCRO-DR"
    Iteration number | Error
    0 | 400
    1 | 295.807
    2 | 86.8807
    3 | 19.1727
    4 | 16.3865
    5 | 4.08176
    6 | 2.44743
    7 | 1.90362
    8 | 1.36418
    9 | 0.823333
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  tbl6: Table "Solution 1/Stationary Solver 1, GCRO-DR 1"
    Iteration number | Error
    0 | 400
    1 | 320.076
    2 | 101.11
    3 | 19.0834
    4 | 4.1865
    5 | 1.36776
    6 | 0.699924
    7 | 0.383495
    8 | 0.18893
    9 | 0.0920399
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  tbl7: Table "Solution 1/Stationary Solver 1, GCRO-DR 2"
    Iteration number | Error
    0 | 400
    1 | 291.138
    2 | 286.888
    3 | 79.7595
    4 | 13.3744
    5 | 2.72526
    6 | 0.698263
    7 | 0.182675
    8 | 0.0438217
    9 | 0.010452
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  tbl8: Table "Solution 1/Stationary Solver 1, GCRO-DR 3"
    Iteration number | Error
    0 | 400
    1 | 291.138
    2 | 286.888
    3 | 79.7595
    4 | 13.3744
    5 | 2.72526
    6 | 0.69826
    7 | 0.182676
    8 | 0.0438231
    9 | 0.0104521
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  tbl9: Table "Solution 1/Stationary Solver 1, GCRO-DR 4"
    Iteration number | Error
    0 | 400
    1 | 290.331
    2 | 287.166
    3 | 78.7497
    4 | 13.2261
    5 | 2.69407
    6 | 0.691147
    7 | 0.18077
    8 | 0.0433884
    9 | 0.0103569
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  tbl10: Table "Solution 1/Stationary Solver 2, Conjugate gradients"
    Iteration number | Error
    0 | 400
    1 | 133.561
    2 | 28.1858
    3 | 2.05329
    4 | 0.545296
    5 | 0.10383
    6 | 0.0135269
    7 | 0.00153121
    8 | 0.00022601
    8 | 0.00022601
  tbl12: Table
    // Global Evaluation 3 {gev3}
    freq (MHz) | Lumped port current (A)
    125.75 | 0.00608084-0.013963i
    500 | 0.000439357-0.00400329i
  tbl13: Table
    // Global Evaluation 4 {gev4}
    freq (MHz) | (1+emw.S11)/(1-emw.S11)*50 (1) | Lumped port impedance (Ω) | S11 (1)
    500 | 4.12955+493.353i | 4.12955+493.353i | 0.978025+0.200284i

Plots
  pg1: PlotGroup3D "Electric Field (emw)" (disabled) | data = dset1
    mslc1: Multislice | expr = emw.normE
  pg3: PlotGroup3D "3D Plot Group 3" | data = dset1; applyselectiontodatasetedges = on
  pg7: PlotGroup2D "B1, x-y plane" (disabled) | data = cpl1; xlabel = x; ylabel = y
    surf1: Surface | expr = abs(emw.Bx)
    arws1: ArrowSurface
      planecoordsys = cartesian
      expr = {emw.Bx, emw.By, emw.Bz}
      descr = Magnetic flux density
      xnumber = 20
      ynumber = 20
      arrowlength = normalized
  pg2: PlotGroup2D "B1, x-z plane" (disabled) | data = cpl3; xlabel = x; ylabel = z
    surf1: Surface | expr = abs(emw.Bx)
    arws1: ArrowSurface
      planecoordsys = cartesian
      expr = {emw.Bx, emw.By, emw.Bz}
      descr = Magnetic flux density
      xnumber = 20
      ynumber = 20
      arrowlength = normalized
  pg6: PlotGroup2D "B1, y-z plane" (disabled) | data = cpl2; xlabel = y; ylabel = z
    surf1: Surface | expr = abs(emw.Bx)
    arws1: ArrowSurface (disabled)
      planecoordsys = cartesian
      expr = {emw.Bx, emw.By, emw.Bz}
      descr = Magnetic flux density
      xnumber = 20
      ynumber = 20
      arrowlength = normalized
  pg4: PlotGroup1D "B1(x)" | data = cln1; xlabel = x/l_sample; ylabel = real(emw.Bx) (T)
    lngr1: LineGraph
      data = cln1
      expr = abs(emw.Bx/emw.Iport_1)
      unit = kg/(s^2*A^2)
      xdata = expr
      xdataexpr = x/l_sample
    lngr2: LineGraph
      data = cln1
      expr = abs(emw.Bx/emw.Iport_1)
      unit = kg/(s^2*A^2)
      xdata = expr
      xdataexpr = x/l_sample
  pg8: PlotGroup1D "B1(y)" | data = cln2; xlabel = y/r_sample; ylabel = real(emw.Bx) (T)
    lngr1: LineGraph | expr = arg(emw.By); unit = rad; xdata = expr; xdataexpr = y/r_sample
  pg9: PlotGroup1D "B1(z)" (disabled) | data = cln3; xlabel = z/r_sample; ylabel = real(emw.Bx) (T)
    lngr1: LineGraph | expr = real(emw.Bx); unit = T; xdata = expr; xdataexpr = z/r_sample
  pg10: PlotGroup1D "Z1" (disabled) | data = dset1
  pg11: PlotGroup1D "1D Plot Group 11" (disabled) | data = dset1; xlabel = water epsilon; ylabel = abs(emw.Zport_1) (Ω)
    lngr1: LineGraph on all edges | data = dset1; expr = abs(emw.Zport_1); xdata = expr; xdataexpr = eps_water