// COMSOL Multiphysics 6.1.0.357 model "C2_solenoid_DC.mph"
// Outline of the model tree

Parameters
  h_cylinder = (n_cycle+2)*l
  r_cross = 0.03[mm]  // redius of cross section
  r_circular = 0.5[mm]  // radius of helix
  l = 0.1[mm]  // length per period of helix
  n_cycle = 20  // cycles
  r_sample = 100e-6[m]  // radius of sample
  l_sample = 2500e-6[m]  // length of sample
  I0 = -4e-3[A]
  dz_array = r_circular*6
  PortName = 1
  dy_array = r_circular*20
  dx_array = r_circular*6
  r_air = l_sample*4
  num = 2  // coil number
  r_array = r_circular*2.5
  B0 = 11.74[T]
  a_block = r_array*3

Variables
  var1 "Variables 1"
    p1 = 1  // ''mov5(1)"
    p2 = 1  // ''mov5(6)"
    p3 = 1  // ''mov5(10)"
    p4 = 1  // ''mov5(5)"

Selections
  sel1: Explicit "sample" on domains 2, 3
  sel2: Explicit "coil" on domains 4, 5

Coordinate systems
  pml1: PML "Perfectly Matched Layer 1" on no domains | ScalingType = Spherical

Geometry
  geom1 "Geometry 1" (3D, length unit m)
    hel1: Helix | turns = n_cycle; rmaj = r_circular; rmin = r_cross; axialpitch = l
    wp1: WorkPlane | quickplane = xz; unite = on
      r1: Rectangle | pos = {0.5e-3, 1.98e-3}; size = {0.25e-3, 0.05e-3}
      r2: Rectangle | pos = {0.5e-3, -0.03e-3}; size = {0.25e-3, 0.05e-3}
      r3: Rectangle | pos = {0.63e-3, 0.02e-3}; size = {0.12e-3, 1.96e-3}
    rot1: Rotate | input = hel1, wp1; axistype = y; rot = 90
    mov1: Move | input = rot1; displx = -n_cycle*l/2; disply = 0; displz = 0
    cyl2: Cylinder | pos = {-l_sample/2, 0, 0}; axistype = x; r = r_sample; h = l_sample
    pt1: Point
    mov2: Move | input = cyl2, mov1, pt1; displx = 0; disply = r_array
    rot2: Rotate | input = mov2(1), mov2(2), mov2(3); pos = {0, r_array, 0}; axistype = x; rot = 90
    rot3: Rotate | input = mov2(4), rot2; keep = on; axistype = x; rot = range(360/num,360/num,360-360/num)
    blk1: Block | base = center; size = {a_block, a_block, a_block}
    fin: Finalize "Form Union"

Materials
  mat2: Common "Air" on all domains
    def "Basic"
      thermalexpansioncoefficient = alpha_p(pA,T)
      molarmass = 0.02897
      bulkviscosity = muB(T)
      relpermeability = 1
      relpermittivity = 1
      dynamicviscosity = eta(T)
      ratioofspecificheat = 1.4
      electricconductivity = 0[S/m]
      heatcapacity = Cp(T)
      density = rho(pA,T)
      thermalconductivity = k(T)
      soundspeed = cs(T)
      eta: Piecewise | arg = T; pieces = {200.0, 1600.0, -8.38278E-7+8.35717342E-8*T^1-7.69429583E-11*T^2+4.6437266E-14*T^3-1.06585607E-17*T^4}; argunit = K; fununit = Pa*s
      Cp: Piecewise | arg = T; pieces = {200.0, 1600.0, 1047.63657-0.372589265*T^1+9.45304214E-4*T^2-6.02409443E-7*T^3+1.2858961E-10*T^4}; argunit = K; fununit = J/(kg*K)
      rho: Analytic | expr = pA*0.02897/R_const[K*mol/J]/T; args = {pA, T}; dermethod = manual; argders = {{pA, d(pA*0.02897/R_const/T,pA)}, {T, d(pA*0.02897/R_const/T,T)}}; fununit = kg/m^3; argunit = {Pa, K}
      k: Piecewise | arg = T; pieces = {200.0, 1600.0, -0.00227583562+1.15480022E-4*T^1-7.90252856E-8*T^2+4.11702505E-11*T^3-7.43864331E-15*T^4}; argunit = K; fununit = W/(m*K)
      cs: Analytic | expr = sqrt(1.4*R_const[K*mol/J]/0.02897*T); args = T; dermethod = manual; fununit = m/s; argunit = K
      an1: Analytic | funcname = alpha_p; expr = -1/rho(pA,T)*d(rho(pA,T),T); args = {pA, T}; fununit = 1/K; argunit = {Pa, K}
      an2: Analytic "Analytic 2a" | funcname = muB; expr = 0.6*eta(T); args = T; fununit = Pa*s; argunit = K
    RefractiveIndex
      n = 1
      ki = 0
    NonlinearModel
      BA = (def.gamma+1)/2
  mat1: Common "Copper" on domains 4, 5
    def "Basic"
      relpermeability = 1
      electricconductivity = 5.998e7[S/m]
      thermalexpansioncoefficient = 17e-6[1/K]
      heatcapacity = 385[J/(kg*K)]
      relpermittivity = 1
      density = 8960[kg/m^3]
      thermalconductivity = 400[W/(m*K)]
    Enu "Young's modulus and Poisson's ratio"
      E = 110e9[Pa]
      nu = 0.35
    linzRes "Linearized resistivity"
      rho0 = 1.72e-8[ohm*m]
      alpha = 0.0039[1/K]
      Tref = 298[K]
  mat3: Common "Water, liquid" on domains 2, 3
    def "Basic"
      thermalexpansioncoefficient = alpha_p(T)
      bulkviscosity = muB(T)
      dynamicviscosity = eta(T)
      ratioofspecificheat = gamma_w(T)
      electricconductivity = 5.5e-6[S/m]
      heatcapacity = Cp(T)
      density = rho(T)
      thermalconductivity = k(T)
      soundspeed = cs(T)
      relpermeability = 1-9.035e-6
      relpermittivity = 81
      eta: Piecewise
        arg = T
        pieces = 
          {273.15, 413.15, 1.3799566804-0.021224019151*T^1+1.3604562827E-4*T^2-4.6454090319E-7*T^3+8.9042735735E-10*T^4-9.0790692686E-13*T^5+3.8457331488E-16*T^6}
          {413.15, 553.75, 0.00401235783-2.10746715E-5*T^1+3.85772275E-8*T^2-2.39730284E-11*T^3}
        argunit = K
        fununit = Pa*s
      Cp: Piecewise | arg = T; pieces = {273.15, 553.75, 12010.1471-80.4072879*T^1+0.309866854*T^2-5.38186884E-4*T^3+3.62536437E-7*T^4}; argunit = K; fununit = J/(kg*K)
      rho: Piecewise
        arg = T
        smooth = contd1
        pieces = 
          {273.15, 293.15, 6.3092789034e-05*T^3-0.0603676398829*T^2+18.9229382407066*T-950.704055329848}
          {293.15, 373.15, 1.0335053319e-05*T^3-0.0133950656345*T^2+4.96928883266*T+432.257114008512}
        argunit = K
        fununit = kg/m^3
      k: Piecewise | arg = T; pieces = {273.15, 553.75, -0.869083936+0.00894880345*T^1-1.58366345E-5*T^2+7.97543259E-9*T^3}; argunit = K; fununit = W/(m*K)
      cs: Interpolation | table = {{273, 1403}, {278, 1427}, {283, 1447}, {293, 1481}, {303, 1507}, {313, 1526}, {323, 1541}, {333, 1552}, {343, 1555}, {353, 1555}, {363, 1550}, {373, 1543}}; interp = piecewisecubic; fununit = m/s; argunit = K
      an1: Analytic | funcname = alpha_p; expr = -1/rho(T)*d(rho(T),T); args = T; fununit = 1/K; argunit = K
      an2: Analytic | funcname = gamma_w; expr = 1+(T/Cp(T))*(alpha_p(T)*cs(T))^2; args = T; fununit = 1; argunit = K
      an3: Analytic | funcname = muB; expr = 2.79*eta(T); args = T; fununit = Pa*s; argunit = K

Physics
  mfnc: MagnetostaticsNoCurrents "Magnetic Fields, No Currents" on all domains
    dependent variable Vm
    BackgroundField.SolveFor = ReducedField
    BackgroundField.Hb = {0, 0, B0/mu0_const}
    mfc1: MagneticFluxConservation (default)
    mi1: MagneticInsulation (default)
    init1: init "Initial Values 1" (default)
    exfd1: ExternalMagneticFluxDensity on all boundaries

Mesh
  mesh1 "Mesh 1"
    ftri1: FreeTri "port" (disabled) on boundaries 16, 17, 22, 27, 32, 33, 36, 37, 40, 41
      size1: Size on boundaries 16, 17, 22, 27, 32, 33, 36, 37, 40, 41 | hauto = 1
    ftet2: FreeTet "sample" on selection sel1
      size1: Size on selection sel1 | hmax = 2.2E-4; hmin = 1.6E-5; hauto = 3
    ftet1: FreeTet "coil" on selection sel2
      size1: Size on domains 2-5 | hmax = 2.2E-4; hmin = 1.6E-5; hauto = 3
    ftet3: FreeTet "Free Tetrahedral 3" on remaining entities
      size1: Size on entire geometry

Studies
  std1 "Study 1"
    freq: Frequency "Frequency Domain" | punit = MHz; plist = 500

Solver configurations
  sol1 "Solution 1" (study std1)
    v1: Variables "Dependent Variables 1"
    s1: Stationary "Stationary Solver 1" | linpmethod = sol
      p1: Parametric | pname = freq; plistarr = 500; punit = MHz; pcontinuationmode = no
      fc1: FullyCoupled | linsolver = i1
      i1: Iterative | prefuntype = right; nlinnormuse = on
        mg1: Multigrid

Datasets
  dset1: Solution | solution = sol1
  cpl1: CutPlane | data = dset1; quickplane = xy

Plots
  pg1: PlotGroup2D "2D Plot Group 1" | data = cpl1
    surf1: Surface | data = cpl1; expr = (mfnc.Bz-11.74)/11.74*1e6